// COMSOL Multiphysics 6.3.0.290 model "FEA Model.mph"
// Outline of the model tree

Geometry
  geom1 "Geometry 1" (2D, length unit mm)
    r1: Rectangle "Bottom DBC Copper Layer" | size = {5, 0.2}
    r2: Rectangle "DBC Ceramic Layer" | size = {5.5, 0.3}; pos = {0, 0.2}
    r3: Rectangle "Top DBC Copper Layer" | size = {5, 0.2}; pos = {0, .5}
    r4: Rectangle "Solder" | size = {3.25, 0.12}; pos = {0, 0.7}
    r5: Rectangle "Si Chip" | size = {3.25, 0.14}; pos = {0, 0.82}
    fin: Finalize "Form Union"

Materials
  mat1: Common "Si Chip" on domains 5
    def: def "Basic"
      density = 2330
      thermalconductivity = 130
      heatcapacity = 700
      thermalexpansioncoefficient = 3e-6
    Enu: Enu "Young's modulus and Poisson's ratio"
      E = 162[GPa]
      nu = 0.28
  mat2: Common "Solder" on domains 4
    def: def "Basic"
      density = 7380
      thermalconductivity = 50
      heatcapacity = 150
      thermalexpansioncoefficient = 23e-6
    Enu: Enu "Young's modulus and Poisson's ratio"
      E = 40[GPa]
      nu = 0.40
  mat3: Common "Copper Custom" on domains 1, 3
    def: def "Basic"
      density = 8960
      thermalconductivity = 400
      heatcapacity = 380
      thermalexpansioncoefficient = 17e-6
    Enu: Enu "Young's modulus and Poisson's ratio"
      E = 110[GPa]
      nu = 0.35
  mat4: Common "Ceramic Al2O3" on domains 2
    def: def "Basic"
      density = 3900
      thermalconductivity = 35
      heatcapacity = 730
      thermalexpansioncoefficient = 6.5e-6
    Enu: Enu "Young's modulus and Poisson's ratio"
      E = 100[GPa]
      nu = 0.22

Physics
  solid: SolidMechanics on all domains
    dependent variable u = {u, v, w}
    d.d = 1[m]
    StructuralTransientBehavior.StructuralTransientBehavior = Quasistatic
    lemm1: LinearElasticModel "Linear Elastic Material 1" (default) | CalculateDissipatedEnergy = 1
      vpl1: Viscoplasticity on domains 4
        A_ana_mat = userdef
        A_ana = 4.1e6
        xi_ana_mat = userdef
        xi_ana = 1.5
        m_ana_mat = userdef
        m_ana = 0.303
        ssat_ana_mat = userdef
        ssat_ana = 13.79[MPa]
        sa_init_mat = userdef
        sa_init = 12.41[MPa]
        h0_ana_mat = userdef
        h0_ana = 1378.95[MPa]
        a_ana_mat = userdef
        a_ana = 1.3
        n_ana_mat = userdef
        n_ana = 0.07
        Q_ana_mat = userdef
        Q_ana = 78156
    free1: Free (default)
    init1: init "Initial Values 1" (default)
    sym1: SymmetrySolid "Symmetry 1" on boundaries 1, 3, 5, 7, 9
    fix1: Fixed "Fixed Constraint 1" on boundaries 2
  ht: HeatTransfer "Heat Transfer in Solids" on all domains
    dependent variable T
    PhysicalModelProperty.dz = 1[m]
    solid1: SolidHeatTransferModel "Solid 1" (default)
    init1: init "Initial Values 1" (default)
    ins1: ThermalInsulation (default)
    sym1: Symmetry on boundaries 1, 3, 5, 7, 9
    hs1: HeatSource on domains 5 | Q0 = 4.5e8[W/m^3] * (mod(t, 4[s]) < 2[s])
    hf1: HeatFluxBoundary "Heat Flux 1" on boundaries 2 | HeatFluxType = ConvectiveHeatFlux; h = 1000

Multiphysics
  te1: ThermalExpansion on all domains | Heat_physics = ht; Solid_physics = solid

Mesh
  mesh1 "Mesh 1"
    size: MeshSizeDefault | hauto = 4
    size1: Size on domains 4 | hauto = 1
    ftri1: FreeTri "Free Triangular 1" on domains 1-5

Studies
  std1 "Study 1"
    time: Transient "Time Dependent" | tlist = range(0, 0.05, 12)

Datasets
  dset1: Solution | solution = none

Derived values
  max1: MaxSurface "Surface Maximum Temp" on all domains | data = dset1; table = tbl6; expr = T
  max2: MaxSurface "Max Stress" on all domains | data = dset1; table = tbl8; expr = solid.mises; unit = MPa
  max3: MaxSurface "Max Strain" on all domains | data = dset1; table = tbl9; expr = solid.evpe

Tables
  tbl1: Table
    // Surface Maximum 1
    Time (s) | Temperature (K)
    0 | 293.152
    0.05 | 293.555
    0.1 | 293.812
    0.15 | 294.048
    0.2 | 294.274
    0.25 | 294.497
    0.3 | 294.699
    0.35 | 294.902
    0.4 | 295.104
    0.45 | 295.307
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  tbl2: Table
    // Surface Maximum 1
    Time (s) | von Mises stress (N/m^2) | von Mises stress (MPa) | von Mises stress (MPa) | von Mises stress (MPa) | von Mises stress (MPa)
    0 | 2024.46 | 0.00202446 | 0.0154098 | 0.0154098 | 0.0154098
    0.05 | 1.03828e+06 | 1.03828 | 1.03896 | 1.03896 | 1.03896
    0.1 | 1.9794e+06 | 1.9794 | 1.97782 | 1.97782 | 1.97782
    0.15 | 2.90405e+06 | 2.90405 | 2.91425 | 2.91425 | 2.91425
    0.2 | 3.8604e+06 | 3.8604 | 3.85214 | 3.85214 | 3.85214
    0.25 | 4.90889e+06 | 4.90889 | 4.89351 | 4.89351 | 4.89351
    0.3 | 5.88444e+06 | 5.88444 | 5.92955 | 5.92955 | 5.92955
    0.35 | 6.86011e+06 | 6.86011 | 6.87002 | 6.87002 | 6.87002
    0.4 | 7.83584e+06 | 7.83584 | 7.81055 | 7.81055 | 7.81055
    0.45 | 8.81163e+06 | 8.81163 | 8.75113 | 8.75113 | 8.75113
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  tbl3: Table
    // Surface Maximum 2
    Time (s) | Temperature (K)
    0 | 293.152
    0.05 | 293.555
    0.1 | 293.812
    0.15 | 294.048
    0.2 | 294.274
    0.25 | 294.497
    0.3 | 294.699
    0.35 | 294.902
    0.4 | 295.104
    0.45 | 295.307
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  tbl4: Table
    // Surface Maximum 1
    Time (s) | Temperature (K)
    0 | 293.163
    0.05 | 293.556
    0.1 | 293.812
    0.15 | 294.053
    0.2 | 294.272
    0.25 | 294.492
    0.3 | 294.71
    0.35 | 294.905
    0.4 | 295.099
    0.45 | 295.294
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  tbl5: Table
    // Surface Maximum 1
    Time (s) | von Mises stress (MPa)
    0 | 0.00749801
    0.05 | 3.83847
    0.1 | 7.32767
    0.15 | 10.7912
    0.2 | 14.3732
    0.25 | 18.2926
    0.3 | 22.155
    0.35 | 25.9726
    0.4 | 29.7232
    0.45 | 33.41
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  tbl6: Table
    // Surface Maximum Temp
    Time (s) | Temperature (K)
    0 | 293.157
    0.05 | 294.636
    0.1 | 295.595
    0.15 | 296.49
    0.2 | 297.344
    0.25 | 298.169
    0.3 | 298.973
    0.35 | 299.765
    0.4 | 300.541
    0.45 | 301.302
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  tbl7: Table
    // Surface Maximum 2
    Time (s) | von Mises stress (MPa)
    0 | 0.00750016
    0.05 | 3.88797
    0.1 | 7.42206
    0.15 | 11.9304
    0.2 | 16.4989
    0.25 | 21.0332
    0.3 | 25.5024
    0.35 | 29.9199
    0.4 | 34.2601
    0.45 | 38.5266
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  tbl8: Table
    // Max Stress
    Time (s) | von Mises stress (MPa)
    0 | 0.00675014
    0.05 | 3.49894
    0.1 | 6.67725
    0.15 | 10.7353
    0.2 | 14.8345
    0.25 | 18.9042
    0.3 | 22.925
    0.35 | 26.8882
    0.4 | 30.7864
    0.45 | 34.6206
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  tbl9: Table
    // Max Strain
    Time (s) | Equivalent viscoplastic strain (1)
    0 | 0
    0.05 | 1.111e-11
    0.1 | 1.8187e-10
    0.15 | 1.27621e-09
    0.2 | 4.77614e-09
    0.25 | 1.23853e-08
    0.3 | 2.9864e-08
    0.35 | 6.88154e-08
    0.4 | 1.47309e-07
    0.45 | 2.78947e-07
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
Plots
  pg3: PlotGroup1D "1D Plot Group 3" | data = none
    tblp1: Table "Table Graph 1" | table = tbl2
  pg4: PlotGroup1D "1D Plot Group 4" | data = none
    tblp1: Table "Table Graph 1" | table = tbl3
  pg5: PlotGroup1D "1D Plot Group 5" | data = none
    tblp1: Table "Table Graph 1" | table = tbl4
  pg8: PlotGroup1D "1D Plot Group 8" | data = none
    tblp1: Table "Table Graph 1" | table = tbl5
  pg9: PlotGroup2D "Stress (solid)" | data = dset1
    surf1: Surface | expr = solid.mises; unit = MPa
      def: Deform "Deformation" | expr = {u, v}; descr = Displacement field
  pg10: PlotGroup2D "Temperature (ht)" | data = dset1
    surf1: Surface | expr = T
  pg11: PlotGroup1D "1D Plot Group 11" | data = none
    tblp1: Table "Table Graph 1" | table = tbl7
  pg12: PlotGroup1D "1D Plot Group 12" | data = none
    tblp1: Table "Table Graph 1" | table = tbl8
  pg13: PlotGroup2D "2D Plot Group 13" | data = dset1
    surf1: Surface "Strain" | expr = solid.evpe
  pg14: PlotGroup1D "1D Plot Group 14" | data = none
    tblp1: Table "Table Graph 1" | table = tbl9